*Heading
** Job name: Job-1 Model name: Model-1
** Generated by: Abaqus/CAE 2020
*Preprint, echo=NO, model=NO, history=NO, contact=NO
**
** PARTS
**
*Part, name=Part-1
*End Part
**
*Part, name=Part-2
*End Part
**
**
** ASSEMBLY
**
*Assembly, name=Assembly
**
*Instance, name=Part-1-1, part=Part-1
*Node
      1,           8.,           1.,           3.
      2,           8.,          0.5,           3.
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*Element, type=C3D8
  1,  22,  23,  26,  25,   1,   2,   5,   4
  2,  23,  24,  27,  26,   2,   3,   6,   5
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*Nset, nset=Set-1, generate
   1,  357,    1
*Elset, elset=Set-1, generate
   1,  192,    1
** Section: Section-2
*Solid Section, elset=Set-1, material=Material-2
,
*End Instance
**
*Instance, name=Part-2-1, part=Part-2
          0.,          1.5,           0.
*Node
      1,   7.16506338,         1.25,           3.
      2,   7.59807634,           1.,           3.
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*Element, type=C3D8
  1,   28,   81,    9,    1,  142,  195,  123,  115
  2,   81,   10,    2,    9,  195,  124,  116,  123
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*Nset, nset=Set-1, generate
    1,  1254,     1
*Elset, elset=Set-1, generate
   1,  740,    1
** Section: Section-1
*Solid Section, elset=Set-1, material=Material-1
,
*End Instance
**
*Nset, nset=Set-3, instance=Part-1-1, generate
   3,  357,    3
*Elset, elset=Set-3, instance=Part-1-1, generate
   2,  192,    2
*Nset, nset=Set-4, instance=Part-2-1
    3,    4,   19,  117,  118,  133
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*Elset, elset=Set-4, instance=Part-2-1
  19,  20,  93,  94, 167, 168
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*Nset, nset=surf1, instance=Part-2-1
    5,    8,   47,   48,   49,   50
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*Elset, elset=surf1, instance=Part-2-1
  21,  23,  25,  27,  29,  31
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*Nset, nset=surf2, instance=Part-1-1, generate
   1,  355,    3
*Elset, elset=surf2, instance=Part-1-1, generate
   1,  191,    2
*Elset, elset=_Surf-1_S6, internal, instance=Part-1-1, generate
   1,  191,    2
*Surface, type=ELEMENT, name=Surf-1
_Surf-1_S6, S6
*Elset, elset=_Surf-2_S6, internal, instance=Part-2-1
  21,  23,  25,  27,  29,  31
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*Surface, type=ELEMENT, name=Surf-2
_Surf-2_S6, S6
*Nset, nset="_T-Datum csys-2", internal
Set-4,
*Transform, nset="_T-Datum csys-2"
0.500000000000001, 0.866025403784438,           0., -0.866025403784438, 0.500000000000001,           0.
*End Assembly
**
** MATERIALS
**
*Material, name=Material-1
*User Material, constants=1
0.,
*Material, name=Material-2
*Elastic
 2e+06, 0.3
**
** INTERACTION PROPERTIES
**
*Surface Interaction, name=IntProp-1
1.,
*Cohesive Behavior, eligibility=CURRENT CONTACTS
100.,100.,100.
*Damage Initiation, criterion=MAXS
 0.3, 0.3, 0.3
*Damage Evolution, type=ENERGY
 0.1,
**
** INTERACTIONS
**
** Interaction: Int-1
*Contact Pair, interaction=IntProp-1, small sliding, type=SURFACE TO SURFACE
Surf-2, Surf-1
** ----------------------------------------------------------------
**
** STEP: Step-1
**
*Step, name=Step-1, nlgeom=YES
*Static
0.1, 1., 1e-05, 1.
**
** BOUNDARY CONDITIONS
**
** Name: BC-1 Type: Symmetry/Antisymmetry/Encastre
*Boundary
Set-3, ENCASTRE
** Name: BC-2 Type: Displacement/Rotation
*Boundary
Set-4, 1, 1, 1.
Set-4, 2, 2
Set-4, 3, 3
**
** OUTPUT REQUESTS
**
*Restart, write, frequency=0
**
** FIELD OUTPUT: F-Output-1
**
*Output, field, variable=PRESELECT
**
** HISTORY OUTPUT: H-Output-1
**
*Output, history, variable=PRESELECT
*End Step
